# Міністерство освіти і науки України
# Національний технічний університет України
# "Київський політехнічний інститут ім. Ігоря Сікорського"
# Розрахункова графічна робота
# "Виконання кусочно-лінійної апроксимації"
# Варіант №19
Виконав
# студент групи ІВ-91
# Мусійчук Ярослав
# Київ - 2021
# 1. Побудувати графік функції y=f(x) для діапазону зміни аргументу x_min<=x<=x_max.
# Значення y=f(x), x_min та x_max узяти з таблиці варіантів.
x_min := -1
x_max := 1
f(x) :=
    x^2 if x ≤ 0
    -x^2 if x ≥ 0
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# 2. Визначити другу похідну функції
d^2*y/dx^2
# та побудувати її графік для діапазону зміни
# аргументу
# x_min<=x<=x_max.
d2f(x) :=
    d^2/dx^2(x^2) if x ≤ 0
    d^2/dx^2(-x^2) if x ≥ 0
d^2/dx^2(x^2) → 2
d^2/dx^2(-x^2) → -2
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# 3. Побудувати графік модулю другої похідної функції | |d^2*y/dx^2|
# для діапазону зміни аргументу x_min<=x<=x_max.
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# 4.1 Точки перегину
# 4. Проаналізувати графік нелініної залежності функції y=f(x), з'ясувавши характер
# опуклості та вгнутості функції по частинам, наявність точок перегинання та наявність точок розриву першого роду другої похідної функції.
# Функція має точки перегину в точці x = 0
# 4.2 Опуклість та вгнутість
# f(x) вгнута на відрізку [x_min ; 0].
# f(x) вигнута на відрізку [0 ; x_max].
# 4.3 Точки розриву першого роду другої похідної функції
limit(d^2/dx^2(x^2), x → x_max-) → 2
limit(d^2/dx^2(x^2), x → 0-) → 2
□ = ∞  # error: Пустой местозаполнитель.
limit(d^2/dx^2(x^2), x → x_max+) → 2
limit(d^2/dx^2(x^2), x → 0+) → 2
# Функція не має точки розриву
# 5. Обрати початкову точку(або початкові точки) апроксимації для подальших
# розрахунків, зазначивши її (або їх) на графіках y == f(x) та |d^2*y/dx^2| , визначивши абсцису цієї початкової точки або абсциси початкових точок x_0^1,x_0^2 тощо).
x_01 := x_min
y_11 := f(x_01) = 1
y_21 := |d2f(x_01)| = 2
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# 6. По графіку |d^2*y/dx^2| обрати напрямок (або напрямки) розрахунків значень
# h[i] == x[i] - x[i - 1] (i=1,n) від початкової точки(або від початкових точок) та зазначити  його(або їх) на цьому графіку у вигляді стрілок над графіком |d^2*y/dx^2|.
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# 7. Визначити методику розрахунку значень h_i (i=1,n) та обрати формулу для розрахунку значень: h[i] == sqrt(8*Δf_max/A[i]) або h[i] == sqrt(16*Δf_max/A[i]), де A[i] - максимальне по модулю значення другої похідної на і-й частині ломаної лінії, що розраховується.
# Для обчислення вибираємо -h[i] == sqrt(16*Δf_max/A[i])
# В точці перегину - h[i] == sqrt(8*Δf_max/A[i])
# 8. Підібрати таке значення похибки Δf_max, при якому в результаті розрахунків  h_i (i=1,n) отримаємо n=8 або n=9, тобто отримаємо апроксимуючу ломану лінію  з 8 або з 9
# частин. Виконати розрахунок усіх значень h_i (i=1,n) та здійснити нумерацію вузлів (вершин ломаної лінії), починаючи з номера 0.
# Для лівої частини:
Δf_max := 0.008418
X[0] := x_min = -1
A[1] := |d2f(X[0])| = 2
h[1] := sqrt(16*Δf_max/A[1]) = 0.259507
X[1] := X[0] + h[1] = -0.740493
A[2] := |d2f(X[1])| = 2
h[2] := sqrt(16*Δf_max/A[2]) = 0.259507
X[2] := X[1] + h[2] = -0.480986
A[3] := |d2f(X[2])| = 2
h[3] := sqrt(16*Δf_max/A[3]) = 0.259507
X[3] := X[2] + h[3] = -0.221478
A[4] := |d2f(X[3])| = 2
h[4] := sqrt(8*Δf_max/A[4]) = 0.183499
X[4] := X[3] + h[4] = -0.037979
A[5] := |d2f(X[4])| = 2
# Для лівої частини:
h[5] := sqrt(16*Δf_max/A[5]) = 0.259507
X[5] := X[4] + h[5] = 0.221528
A[6] := |d2f(X[5])| = 2
h[6] := sqrt(16*Δf_max/A[6]) = 0.259507
X[6] := X[5] + h[6] = 0.481035
A[7] := |d2f(X[6])| = 2
h[7] := sqrt(16*Δf_max/A[7]) = 0.259507
X[7] := X[6] + h[6] = 0.740543
A[8] := |d2f(X[7])| = 2
h[8] := sqrt(16*Δf_max/A[8]) = 0.259507
X[8] := X[7] + h[8] = 1.00005
# 9. Здійснити розрахунок абсцис x_i(1, n), починаючи з x_0, початкових ординат y_i^p(0,n), вузлів апроксимації(вершин ломаної лінії), що належать функції y=f(x), та кінцевих ординат y_i^k(0,n), вузлів апроксимації з урахуванням корекції, яку здійснюють для отримання знакозмінної похибки апроксимації.
Yk[j] :=
    Yp[j] - Δf_max if X[j] ≤ 0
    Yp[j] + Δf_max if X[j] ≥ 0
# Виходячи з 8-го завдання, шукаємо ординати вершин ломаної лінії:
j := 0 .. 8
Yp[j] := f(X[j])
Yk[j] :=
    Yp[j] - Δf_max if X[j] ≤ 0
    Yp[j] + Δf_max if X[j] ≥ 0
Yk[4] := Yp[4]
Yp = [1; 0.54833; 0.231347; 0.0490526; 0.0014424; -0.0490748; -0.231395; -0.548403; -1.0001]
X = [-1; -0.740493; -0.480986; -0.221478; -0.037979; 0.221528; 0.481035; 0.740543; 1.00005]
Yk = [0.991582; 0.539912; 0.222929; 0.0406346; 0.0014424; -0.0406568; -0.222977; -0.539985; -0.991682]
# 10. Побудувати графік апроксимуючої функції (ломаної лінії) y=φ(x), використовуючи отримані значення x_i(1, n) та y_i^k(0,n).
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i := 0 .. 7
k[i] := (Yk[i] - Yk[i + 1])/(X[i] - X[i + 1])
k[i] = [-1.74049; -1.22148; -0.702464; -0.213582; -0.162227; -0.702564; -1.22158; -1.74059]
k == tg(α)
# 11. Здійснити розрахунок значень кутових коефіцієнтів (значень тангенсів кутів нахилу), k_i(i=1,n) лінійних частин ломаної лінії.
# Знаходимо кутові коефіцієнти шляхом ділення різниці ординат на різницю абсцис:
# 12. Виконати розкладання апроксимуючої функції (ломаної лінії) y=φ(x) на окремі
# доданки (лінійні та елементарні нелінійні {лінійні з обмеженням на нульовому рівні)}, починаючи з точки, яка має абсцису x_0^a. Значення x_0^a узяти з таблиці варіантів.
# 13. Над кожним елементарним нелінійним доданком зазначити його квадрант (І, ІІ, ІІІ, IV) та режим {на відкривання (на В) чи на закривання (на З)}
x_a[0] := x_max
y_e0(x) := Yk[8]
y(x) := y_e0(x)
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b[7] := k[7]
y_e1(x) := b[7]*(x - X[8])
y(x) := y(x) + y_e1(x)
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b[6] := k[6] - k[7]
y_e2(x) :=
    b[6]*(x - X[7]) if b[6]*(x - X[7]) ≤ 0
    0 if b[6]*(x - X[7]) ≥ 0
y(x) := y(x) + y_e2(x)
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# I квадрант, на закривання
b[5] := k[5] - k[6]
y_e3(x) :=
    b[5]*(x - X[6]) if b[5]*(x - X[6]) ≤ 0
    0 if b[5]*(x - X[6]) ≥ 0
y(x) := y(x) + y_e3(x)
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# I квадрант, на закривання
b[4] := k[4] - k[5]
y_e4(x) :=
    b[4]*(x - X[5]) if b[4]*(x - X[5]) ≤ 0
    0 if b[4]*(x - X[5]) ≥ 0
y(x) := y(x) + y_e4(x)
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# ІV квадрант, на відкривання
b[7] := k[7] - k[6]
y_e5(x) :=
    b[7]*(x - X[7]) if b[7]*(x - X[7]) ≤ 0
    0 if b[7]*(x - X[7]) ≥ 0
y(x) := y(x) + y_e5(x)
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# ІV квадрант, на відкривання
b[8] := k[8] - k[7]  # error: Индекс массива является недопустимым для этого массива.
y_e5(x) :=
    b[8]*(x - X[8]) if b[8]*(x - X[8]) ≤ 0
    0 if b[8]*(x - X[8]) ≥ 0
y(x) := y(x) + y_e5(x)
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# ІV квадрант, на відкривання
b[9] := k[9] - k[8]  # error: Индекс массива является недопустимым для этого массива.
y_e6(x) :=
    b[9]*(x - X[9]) if b[9]*(x - X[9]) ≤ 0
    0 if b[9]*(x - X[9]) ≥ 0
y(x) := y(x) + y_e6(x)
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# ІІ квадрант, на відкривання
b[1] := k[1] - k[2]
y_e7(x) :=
    b[1]*(x - X[2]) if b[1]*(x - X[2]) ≥ 0
    0 if b[1]*(x - X[2]) ≤ 0
y(x) := y(x) + y_e7(x)
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# ІІ квадрант, на відкривання
b[0] := k[0] - k[1]
y_e8(x) :=
    b[0]*(x - X[1]) if b[0]*(x - X[1]) ≥ 0
    0 if b[0]*(x - X[1]) ≤ 0
φ(x) := y(x) + y_e8(x)
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# ІІ квадрант, на відкривання
# 14. Здійснити розрахунок наступних значень:
# - значення φ(x_0^a) для першого лінійного доданку
# - значення b_0=k_0 та x_0 для другого лінійного доданку
# - значення b_i=k_i-k_(i-1) та X_REFi для кожного елементарного нелінійного доданку
# 1) значення φ(x_0^a) для першого лінійного доданку:
φ(x_a[0]) =  # error: Эта переменная не определена.
i := 0 .. 9
j := 0 .. 10
# 2) значення b_0=k_0 та х_0 для другого лінійного доданку:
k[0] = -1.74049
# 3) значення b_i=k_i-k_(i-1) та X_REFi  для кожного елементарного нелінійного доданку:
Xref[j] := X[j]  # error: Индекс массива является недопустимым для этого массива.
b[0] = -0.519014
Xref[j] =  # error
b[i] =  # error: Индекс массива является недопустимым для этого массива.
